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/batch
! ANSYS input file written by Workbench version 2026 R1
! File used for geometry attach: C:\Users\ADMIN\AppData\Local\Temp\WB_ADMIN_10356_2\wbnew_files\dp0\SYS\DM\SYS.dsco
/title,DME_asn--Static Structural (A5)
/com,--- Data in consistent MKS units. See Solving Units in the help system for more information.
/units,MKS
/prep7
! Turn off shape checking because checks already performed inside WB mesher.
! See help system for more information.
SHPP,OFF,,NOWARN
etcon,set             ! allow ANSYS to choose best KEYOP's for 180x elements, resets any applicable keyopt to MAPDL defaults
/com,*********** Send User Defined Coordinate System(s) ***********
local,12,0,0.,-7.04852528870106e-002,1.5,0.,0.,0.
csys,0
/com,*********** Nodes for the whole assembly ***********
nblock,3,,2209
(1i9,3e20.9e3)
        1    -6.250000000E-02    -2.404852527E-01     1.500000000E+00
        2     0.000000000E+00    -2.404852527E-01     1.500000000E+00
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-1
/com,*********** Elements for Body 1 'prt0001\TRM_SRF' ***********
et,1,186
keyo,1,2,1          ! set full integration on SOLID186
MAT,1 $ TYPE,1 $ REAL,1 $ SECNUM,1 $ ESYS,0    ! ELEMNODES = 20
eblock,21,COMPACT,,280
(21i9)
        1      147      245      305      347      148      248      306      348      986     1281     1419      987      989     1286     1421      990      985     1280     1418     1537
        2      146      242      304      346      147      245      305      347      982     1273     1417      983      986     1281     1419      987      981     1272     1416     1534
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-1
secnum,1    ! reset the section ID to default
toffst,273.15,      ! Temperature offset from absolute zero
/com,*********** Set Reference Temperature ***********
tref,22.
/com,*********** Send Materials ***********
Temperature = 'TEMP' ! Temperature
MP,DENS,1,7850,	! kg m^-3
MP,ALPX,1,1.2e-05,	! C^-1
MP,C,1,434,	! J kg^-1 C^-1
MP,KXX,1,60.5,	! W m^-1 C^-1
MP,RSVX,1,1.7e-07,	! kg m^3 A^-2 s^-3
MP,EX,1,200000000000,	! Pa
MP,NUXY,1,0.3,
MP,MURX,1,10000,

!************************* Model Summary ********************
! prt0001\TRM_SRF,	Structural Steel,	matid,	1
!************************* End Model Summary ********************
/com,*********** Fixed Supports ***********
CMBLOCK,_FIXEDSU,NODE,       39
(8i10)
         1       -28       589      -591       593      -595       597       598
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cmsel,s,_FIXEDSU
d,all,all
nsel,all
/com,*********** Define Pressure Using Surface Effect Elements "Pressure 2" ***********
et,2,154
MAT,2 $ TYPE,2 $ REAL,2 $ SECNUM,2 $ ESYS,0    ! ELEMNODES = 8
eblock,21,COMPACT,,80
(21i9)
      869      410      349      408      409     1545     1544     1677     1679
      870      411      352      349      410     1554     1543     1545     1681
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-1
secnum,1    ! reset the section ID to default
esel,s,type,,2
keyop,2,7,0         ! Use deformed area for application of load
esel,all

*DIM,_loadvari45,TABLE,2,2,1,Z,TIME, , 12
! Z values
*TAXIS,_loadvari45(1,1),1,-3.,0.
! Time values
*TAXIS,_loadvari45(1,1),2,0.,1.
! Load values
_loadvari45(1,1,1) = 0.
_loadvari45(1,2,1) = 48000.
_loadvari45(2,1,1) = 0.
_loadvari45(2,2,1) = 72000.


esel,all
fini
/com,****************************************************************************
/com,*************************    SOLUTION       ********************************
/com,****************************************************************************
/solu
antype,0                   ! static analysis
_thickRatio=  1     ! Ratio of thick parts in the model
eqsl,pcg,1e-8,,,,,,1
cntr,print,1               ! print out contact info and also make no initial contact an error
cncheck,dmp		!	Enable program controlled contact splitting for distributed memory parallel run
dmpoption,emat,no             ! Don't combine emat file for DANSYS
dmpoption,esav,no             ! Don't combine esav file for DANSYS
nldiag,cont,iter           ! print out contact info each equilibrium iteration
rescontrol,,none                 ! Do not keep any restart files
/com,****************************************************
/com,******************* SOLVE FOR LS 1 OF 1 ****************
esel,s,type,,2
nsle
sf,all,pres,%_loadvari45%
nsel,all
esel,all
esel,all
nsub,1,1,1
time,1.
outres,erase
outres,all,none
outres,nsol,all,
outres,rsol,all
outres,eangl,all
outres,etmp,all
outres,veng,all
outres,strs,all,
outres,epel,all,
outres,eppl,all,
outres,cont,all,
! *********** WB SOLVE COMMAND ***********
! check interactive state
*get,ANSINTER_,active,,int
*if,ANSINTER_,ne,0,then
/eof
*endif
solve
/com *************** Write FE CONNECTORS *********
CEWRITE,file,ce,,INTE
/com,****************************************************
/com,*************** FINISHED SOLVE FOR LS 1 *************
fini
*get,_NSOLTHREADS,active,0,ntfs
*get,_NSOLPROCESSES,active,0,npfs
*get,_PCGITER,active,,solu,cgiter
/post1
fini
